// COMSOL Multiphysics 5.3.1.348 model "Bez.mph"
// Outline of the model tree

Geometry
  geom2 "Geometry 1" (2D, length unit m)
    b1: BezierPolygon "Bézier Polygon 1"
      p = {{0, 1, 2, 3, 4, 5}, {0.6, 0.6, 0.6, -0.6, -0.6, -0.6}}
      degree = {1, 3, 1}
      w = {1, 1, 1, 1, 1, 1, 1, 1}
      type = open
    b2: BezierPolygon "Bézier Polygon 2"
      p = {{0, 1, 2, 3, 4, 5}, {0.4, 0.4, 0.4, -0.8, -0.8, -0.8}}
      degree = {1, 3, 1}
      w = {1, 1, 1, 1, 1, 1, 1, 1}
      type = open
    ls1: LineSegment | specify1 = coord; coord1 = {0, 0.6}; specify2 = coord; coord2 = {0, 0.4}
    ls2: LineSegment | specify1 = coord; coord1 = {5, -0.6}; specify2 = coord; coord2 = {5, -0.8}
    csol1: ConvertToSolid | input = b1, b2, ls1, ls2
    fin: Finalize "Form Union"

Materials
  mat1: Common "Water" on all domains
    def "Basic"
      dynamicviscosity = eta(T[1/K])[Pa*s]
      ratioofspecificheat = 1.0
      electricconductivity = 5.5e-6[S/m]
      heatcapacity = Cp(T[1/K])[J/(kg*K)]
      density = rho(T[1/K])[kg/m^3]
      thermalconductivity = k(T[1/K])[W/(m*K)]
      soundspeed = cs(T[1/K])[m/s]
      eta: Piecewise
        arg = T
        pieces = 
          {273.15, 413.15, 1.3799566804-0.021224019151*T^1+1.3604562827E-4*T^2-4.6454090319E-7*T^3+8.9042735735E-10*T^4-9.0790692686E-13*T^5+3.8457331488E-16*T^6}
          {413.15, 553.75, 0.00401235783-2.10746715E-5*T^1+3.85772275E-8*T^2-2.39730284E-11*T^3}
      Cp: Piecewise | arg = T; pieces = {273.15, 553.75, 12010.1471-80.4072879*T^1+0.309866854*T^2-5.38186884E-4*T^3+3.62536437E-7*T^4}
      rho: Piecewise | arg = T; pieces = {273.15, 553.75, 838.466135+1.40050603*T^1-0.0030112376*T^2+3.71822313E-7*T^3}
      k: Piecewise | arg = T; pieces = {273.15, 553.75, -0.869083936+0.00894880345*T^1-1.58366345E-5*T^2+7.97543259E-9*T^3}
      cs: Interpolation | table = {{273, 1403}, {278, 1427}, {283, 1447}, {293, 1481}, {303, 1507}, {313, 1526}, {323, 1541}, {333, 1552}, {343, 1555}, {353, 1555}, {363, 1550}, {373, 1543}}; interp = piecewisecubic

Physics
  spf1: LaminarFlow on all domains
    dependent variable u = {u, v, w}
    dependent variable p
    dependent variable k
    dependent variable ep
    dependent variable om
    dependent variable G
    dependent variable uc = {ucx, ucy, ucz}
    dependent variable pc
    dependent variable nutilde
    dependent variable yPlus
    dependent variable uPlus
    dependent variable zeta
    dependent variable alpha
    AdvancedSettingProperty.locCFL = spf.localCFLvalue
    fp1: FluidProperties (default)
    init1: init "Initial Values 1" (default)
      nutilde_init = spf.nutildeinit
      G_init = spf.G0
      k_init = spf.kinit
      ep_init = spf.epinit
      om_init = spf.omInit
      yPlus_init = spf.yPlusinit
      uPlus_init = spf.uPlusinit
    wallbc1: WallBC "Wall 1" (default) | beta = 0.5*spf.hmin
    inl1: InletBoundary "Inlet 1" on boundaries 1
      U0in = 0.1
      IT = spf.IT_init
      LT = spf.LT_init
      k0 = spf.k0_init
      ep0 = spf.ep0_init
      om0 = spf.om0_init
      nutilde0 = 3*spf.nu
      zeta0 = spf.zeta0_init
      alpha0 = spf.alpha0_init
    out1: OutletBoundary "Outlet 1" on boundaries 6
      BoundaryCondition = Pressure
      SuppressBackflow = 1
      CompensateForHydrostaticPressureApproximation = 1
      CompensateForHydrostaticPressure = 1
      ComponentWise = NormalOutflowVelocity
      LaminarOutflowOption = Uav
      Lexit = 1
      CompensateForHydrostaticPressureApproximationIO = 1
      CompensateForHydrostaticPressureIO = 1
      Dzexit = 1
      constraintType = symmetricConstraint
      constraintMethod = elemental

Mesh
  mesh2 "Mesh 1" (physics-controlled)
    size: MeshSizeDefault | table = cfd; hauto = 9

Studies
  std1 "Study 1"
    stat: Stationary

Solver configurations
  sol1 "Solution 1" (study std1)
    v1: Variables "Dependent Variables 1"
    s1: Stationary "Stationary Solver 1"
      fc1: FullyCoupled | linsolver = d1; initstep = 0.01; minstep = 1.0E-6; maxiter = 100
      d1: Direct | linsolver = pardiso

Datasets
  dset1: Solution | solution = sol1
  cln1: CutLine2D "Cut Line 2D milieu" | data = dset1; genpoints = {{2, -0.06}, {3, -0.06}}
  cln2: CutLine2D "Cut Line 2D entree" | data = dset1; genpoints = {{0, 0.6}, {0, 0.4}}
  cln3: CutLine2D "Cut Line 2D sortie" | data = dset1; genpoints = {{5, -0.6}, {5, -0.8}}
  edg1: Edge2D on boundaries 8 | data = dset1
  edg2: Edge2D on boundaries 1 | data = dset1
  edg3: Edge2D on boundaries 6 | data = dset1
  cln4: CutLine2D | data = dset1; genpoints = {{2, 0.2}, {3, -0.4}}; pdpoint = {1.6, 0}

Derived values
  int1: IntSurface "Surface Integration 1" on domains 1
    data = dset1
    table = tbl1
    expr = {u, v}
    descr = {"Velocity field, x component", "Velocity field, y component"}
  int3: IntLine "Line Integration entree cut"
    data = cln2
    table = tbl3
    expr = {v, u, p}
    descr = {"Velocity field, y component", "Velocity field, x component", Pressure}
  int4: IntLine "Line Integration outlet cut"
    data = cln3
    table = tbl4
    expr = {u, p}
    descr = {"Velocity field, x component", Pressure}
  int5: IntLine "Line Integration milieu" (disabled)
    data = edg1
    table = new
    expr = {u, v, p, -(u*nx+v*ny)}
    descr = {"Velocity field, x component", "Velocity field, y component", Pressure, }
  int6: IntLine "Line Integration bord haut"
    data = edg1
    table = tbl12
    expr = {-p*nx, -p*ny, -(p*nx+p*ny), spf1.mu*(2*ux*nx+(vx+uy)*nx+(vx+uy)*ny+2*uy*ny), spf1.T_stressx, spf1.T_stressy, spf1.T_stressx+spf1.T_stressy, -(u*nx+v*ny)}
    unit = {N/m, N/m, N/m, N/m, N/m, N/m, N/m, m^2/s}
    descr = {, , , , "Total stress, x component", "Total stress, y component", Force Totale, }
  int7: IntLine "Line Integration inlet edge" | data = edg2; table = tbl8; expr = {-(u*nx+v*ny), -spf1.mu*nx, -p*nx}
  int8: IntLine "Line Integration outlet edge"
    data = edg3
    table = tbl9
    expr = {-p*nx, spf1.mu*nx, -(u*nx+v*ny)}
    unit = {N/m, kg/s, m^2/s}
  int9: IntLine "Line Integration line" | data = cln4; table = tbl14; expr = p; unit = N/m; descr = Pressure

Tables
  tbl1: Table
    // Surface Integration 1 ()
    Velocity field, x component (m^3/s) | Velocity field, y component (m^3/s)
    0.0939545 | -0.0226273
  tbl2: Table
    // Line Integration 2 (u*nx+v*ny)
    u*nx+v*ny (m^2/s)
    -0.0189078
  tbl3: Table
    // Line Integration 3 ()
    Velocity field, y component (m^2/s) | Velocity field, x component (m^2/s) | Pressure (N/m)
    0 | 0.0189078 | 0.962745
  tbl4: Table
    // Line Integration 4 (u)
    Velocity field, x component (m^2/s) | Pressure (N/m)
    0.0189078 | 0.000545775
  tbl7: Table
    // Line Integration bord bas (-p*nx)
    -p*nx (N/m)
    0
  tbl8: Table
    // Line Integration inlet (-(u*nx+v*ny))
    -(u*nx+v*ny) (m^2/s) | -spf1.mu*nx (kg/s) | -p*nx (N/m)
    0.0189078 | 0.000201869 | 0.962745
  tbl9: Table
    // Line Integration outlet (-p*nx)
    -p*nx (N/m) | spf1.mu*nx (kg/s) | -(u*nx+v*ny) (m^2/s)
    -0.000545775 | 0.000201869 | -0.0189078
  tbl11: Table
    // Line Integration 9 (u)
    Velocity field, x component (m^2/s)
    0.107728
  tbl12: Table
    // Line Integration bord haut (-p*nx, -p*ny, -(p*nx+p*ny), spf1.mu*(2*ux*nx+(vx+uy)*nx+(vx+uy)*ny+2*uy*ny), spf1.T_stressx, spf1.T_stressy, spf1.T_stressx+spf1.T_stressy, -(u*nx+v*ny))
    -p*nx (N/m) | -p*ny (N/m) | -(p*nx+p*ny) (N/m) | spf1.mu*(2*ux*nx+(vx+uy)*nx+(vx+uy)*ny+2*uy*ny) (N/m) | Total stress, x component (N/m) | Total stress, y component (N/m) | Force Totale (N/m)
    -0.45647 | -2.06574 | -2.52221 | -0.0389038 | -0.471701 | -2.05988 | -2.53158
  tbl14: Table
    // Line Integration line (p)
    Pressure (N/m)
    -0.160859

Plots
  pg1: PlotGroup2D "Velocity (spf1)" | data = dset1
    surf1: Surface | expr = spf1.U
    arws1: ArrowSurface | expr = {u, v}
  pg2: PlotGroup2D "Pressure (spf1)" | data = dset1
    con1: Contour | expr = p